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/BATCH
/COM,ANSYS RELEASE Release 16.1      BUILD 16.1      UP20150325       17:50:17
/input,menust,tmp,''
/GST,ON
/PLO,INFO,3
/GRO,CURL,ON
/CPLANE,1
WPSTYLE,,,,,,,,0
/PREP7
ET,1,SOLID185
CYL4,0,0,10, ,12, ,20
FLST,5,20,4,ORDE,2
FITEM,5,1
FITEM,5,-20
CM,_Y,LINE
LSEL, , , ,P51X
CM,_Y1,LINE
CMSEL,,_Y
LESIZE,_Y1, , ,8, , , , ,1
MSHAPE,0,3D
MSHKEY,1
CM,_Y,VOLU
VSEL, , , ,       1
CM,_Y1,VOLU
CHKMSH,'VOLU'
CMSEL,S,_Y
VMESH,_Y1
CMDELE,_Y
CMDELE,_Y1
CMDELE,_Y2
FLST,2,20,4,ORDE,2
FITEM,2,1
FITEM,2,-20
LESIZE,P51X, , ,-1, ,1
FLST,5,20,4,ORDE,2
FITEM,5,1
FITEM,5,-20
CM,_Y,LINE
LSEL, , , ,P51X
CM,_Y1,LINE
CMSEL,,_Y
LESIZE,_Y1,1, ,0, , , , ,1
CM,_Y,VOLU
VSEL, , , ,       1
CM,_Y1,VOLU
CHKMSH,'VOLU'
CMSEL,S,_Y
VMESH,_Y1
CMDELE,_Y
CMDELE,_Y1
CMDELE,_Y2
FLST,2,20,4,ORDE,2
FITEM,2,1
FITEM,2,-20
LESIZE,P51X, , ,-1, ,1
lplot
FLST,5,16,4,ORDE,2
FITEM,5,1
FITEM,5,-16
CM,_Y,LINE
LSEL, , , ,P51X
CM,_Y1,LINE
CMSEL,,_Y
LESIZE,_Y1, , ,12, , , , ,1
FLST,5,4,4,ORDE,2
FITEM,5,17
FITEM,5,-20
CM,_Y,LINE
LSEL, , , ,P51X
CM,_Y1,LINE
CMSEL,,_Y
LESIZE,_Y1, , ,24, , , , ,1
CM,_Y,VOLU
VSEL, , , ,       1
CM,_Y1,VOLU
CHKMSH,'VOLU'
CMSEL,S,_Y
VMESH,_Y1
CMDELE,_Y
CMDELE,_Y1
CMDELE,_Y2
CM,_Y,VOLU
VSEL, , , ,       1
CM,_Y1,VOLU
CHKMSH,'VOLU'
CMSEL,S,_Y
VSWEEP,_Y1
CMDELE,_Y
CMDELE,_Y1
CMDELE,_Y2
SAVE
SAVE
SAVE
nlist
elist
nsel,s,loc,z,0
nsel,a,loc,z,20
nplot
allsel
nplot
allsel
eplot
/type,1,5
/cplane,0
/type,1,2
SAVE
FINISH
! /EXIT,MODEL
/BATCH
/COM,ANSYS RELEASE Release 16.1      BUILD 16.1      UP20150325       18:13:18
/input,menust,tmp,''
/COM,ANSYS RELEASE Release 16.1      BUILD 16.1      UP20150325       18:13:18
/GST,ON
/PLO,INFO,3
/GRO,CURL,ON
/CPLANE,1
WPSTYLE,,,,,,,,0
eplot
allsel
/cplane,0
/type,1,5
FINISH
! /EXIT,MODEL
/BATCH
/COM,ANSYS RELEASE Release 16.1      BUILD 16.1      UP20150325       00:51:48
/input,menust,tmp,''
/GST,ON
/PLO,INFO,3
/GRO,CURL,ON
/CPLANE,1
WPSTYLE,,,,,,,,0
/PREP7
ET,1,SOLID185
CYL4,0,0,35.175, ,11, ,100
FINISH
/CLEAR,NOSTART
/COM,ANSYS RELEASE Release 16.1      BUILD 16.1      UP20150325       00:52:41
/PREP7
ET,1,SOLID185
CYL4,0,0,35, ,42, ,100
FINISH
/CLEAR,NOSTART
/COM,ANSYS RELEASE Release 16.1      BUILD 16.1      UP20150325       00:53:17
/PREP7
ET,1,SOLID185
CYL4,0,0,35.175, ,46.175, ,1000
FLST,5,20,4,ORDE,2
FITEM,5,1
FITEM,5,-20
CM,_Y,LINE
LSEL, , , ,P51X
CM,_Y1,LINE
CMSEL,,_Y
LESIZE,_Y1,2, , , , , , ,1
MSHAPE,1,3D
MSHKEY,0
CM,_Y,VOLU
VSEL, , , ,       1
CM,_Y1,VOLU
CHKMSH,'VOLU'
CMSEL,S,_Y
VMESH,_Y1
CMDELE,_Y
CMDELE,_Y1
CMDELE,_Y2
VCLEAR,       1
FLST,2,20,4,ORDE,2
FITEM,2,1
FITEM,2,-20
LESIZE,P51X, , ,-1, ,1
FLST,5,20,4,ORDE,2
FITEM,5,1
FITEM,5,-20
CM,_Y,LINE
LSEL, , , ,P51X
CM,_Y1,LINE
CMSEL,,_Y
LESIZE,_Y1, , ,2, , , , ,1
FLST,5,20,4,ORDE,2
FITEM,5,1
FITEM,5,-20
CM,_Y,LINE
LSEL, , , ,P51X
CM,_Y1,LINE
CMSEL,,_Y
LESIZE,_Y1, , ,24, , , , ,1
VCLEAR,       1
lplot
FLST,2,20,4,ORDE,2
FITEM,2,1
FITEM,2,-20
LESIZE,P51X, , ,-1, ,1
lplot
FLST,5,20,4,ORDE,2
FITEM,5,1
FITEM,5,-20
CM,_Y,LINE
LSEL, , , ,P51X
CM,_Y1,LINE
CMSEL,,_Y
FLST,5,16,4,ORDE,2
FITEM,5,1
FITEM,5,-16
CM,_Y,LINE
LSEL, , , ,P51X
CM,_Y1,LINE
CMSEL,,_Y
LESIZE,_Y1, , ,12, , , , ,1
FLST,5,4,4,ORDE,2
FITEM,5,17
FITEM,5,-20
CM,_Y,LINE
LSEL, , , ,P51X
CM,_Y1,LINE
CMSEL,,_Y
LESIZE,_Y1, , ,24, , , , ,1
CM,_Y,VOLU
VSEL, , , ,       1
CM,_Y1,VOLU
CHKMSH,'VOLU'
CMSEL,S,_Y
VSWEEP,_Y1
CMDELE,_Y
CMDELE,_Y1
CMDELE,_Y2
VCLEAR,       1
lplot
FLST,5,4,4,ORDE,2
FITEM,5,17
FITEM,5,-20
CM,_Y,LINE
LSEL, , , ,P51X
CM,_Y1,LINE
CMSEL,,_Y
LESIZE,_Y1, , ,48, , , , ,1
CM,_Y,VOLU
VSEL, , , ,       1
CM,_Y1,VOLU
CHKMSH,'VOLU'
CMSEL,S,_Y
VSWEEP,_Y1
CMDELE,_Y
CMDELE,_Y1
CMDELE,_Y2
nsel,s,loc,z,0
nsel,a,loc,z,10000
nplot
nsel,a,loc,z,10000
nplot
allsel
nplot
nlist
elist
nlist
nsel,s,loc,z,0
nsel,a,loc,z,1000
nplot
nlist
allsel
nplot
/cplane,0
/type,1,5
eplot
FINISH
! /EXIT,MODEL
