/CLEAR,NOSTART

/prep7
!CSYS, 2
K,1,18.278,0,0
K,2,26.778,0,0
K,3, 0,0,-42.750
K,4, 0,0,-49.250

FLST,3,8,8
FITEM,3,18.4,0, -7.1
FITEM,3,17.8,0, -16.05
FITEM,3,14.9,0,-27.95
FITEM,3,7.9,0,-37.9
FITEM,3,26.3,0,-7.35
FITEM,3,25.1,0,-18.15
FITEM,3,20.75,0,-32.8
FITEM,3,10.05,0,-44.7
K, ,P51X

LSTR,       1,       2
LSTR,       3,       4

FLST,3,6,3
FITEM,3,1
FITEM,3,5
FITEM,3,6
FITEM,3,7
FITEM,3,8
FITEM,3,3
BSPLIN, ,P51X
FLST,3,6,3
FITEM,3,2
FITEM,3,9
FITEM,3,10
FITEM,3,11
FITEM,3,12
FITEM,3,4
BSPLIN, ,P51X
