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/BATCH
/COM,ANSYS RELEASE Release 16.1      BUILD 16.1      UP20150325       16:15:19
/input,menust,tmp,''
/GST,ON
/PLO,INFO,3
/GRO,CURL,ON
/CPLANE,1
WPSTYLE,,,,,,,,0
/PREP7
ET,1,SOLID185
! /CLEAR,NOSTART
/COM,ANSYS RELEASE Release 16.1      BUILD 16.1      UP20150325       00:46:29
! K,1,18.278,0,0
! K,2,26.778,0,0
! K,0,0,-42.750
! K,0,0,-49.250
! \begin
! begin
! \prep7
/prep7
K,1,18.278,0,0
K,2,26.778,0,0
K,0,0,-42.750
K,0,0,-49.250
FLST,3,8,8
FITEM,3,18.4,-7.1,0
FITEM,3,17.8,-16.05,0
FITEM,3,14.9,-27.95,0
FITEM,3,7.9,-37.9,0
FITEM,3,26.3,-7.35,0
FITEM,3,25.1,-18.15,0
FITEM,3,20.75,-32.8,0
FITEM,3,10.05,-44.7,0
K, ,P51X
LSTR,       1,       2
LSTR,       3,       4
FLST,3,6,3
FITEM,3,1
FITEM,3,5
FITEM,3,6
FITEM,3,7
FITEM,3,8
FITEM,3,3
BSPLIN, ,P51X
FLST,3,6,3
FITEM,3,2
FITEM,3,9
FITEM,3,10
FITEM,3,11
FITEM,3,12
FITEM,3,4
BSPLIN, ,P51X
FLST,3,16,8
FITEM,3,18.4,-3.6,0
FITEM,3,26.6,-3.5,0
FITEM,3,18.2,-11.1,0
FITEM,3,25.9,-11.55,0
FITEM,3,17.4,-18.75,0
FITEM,3,23.1,-27.4,0
FITEM,3,16.35,-23.3,0
FITEM,3,24.6,-21.45,0
FITEM,3,14.25,-29.1,0
FITEM,3,19.6,-34.65,0
FITEM,3,10.35,-35.25,0
FITEM,3,14.65,-41,0
FITEM,3,5.9,-39.45,0
FITEM,3,8.45,-45.85,0
FITEM,3,2.4,-41.7,0
FITEM,3,3.75,-48.05,0
K, ,P51X
FLST,3,2,8
FITEM,3,12.85,-31.75,0
FITEM,3,17.95,-37.25,0
K, ,P51X
SAVE,'test_a_new_one','','D:\Life\Education\PhD\RootNode\2018\FEA\ansys_gr_updated\test_functions\create_lv_mesh\'
SAVE
FLST,2,2,4,ORDE,2
FITEM,2,3
FITEM,2,-4
LDELE,P51X
FLST,2,2,4,ORDE,2
FITEM,2,1
FITEM,2,-2
LDELE,P51X
LSTR,       1,       2
LSTR,      14,      13
LSTR,       1,      13
LSTR,       2,      14
LSTR,      13,       5
LSTR,       5,      15
LSTR,       5,       9
LSTR,      14,       9
LSTR,       9,      16
LSTR,      16,      10
LSTR,      10,      20
LSTR,      20,      18
LSTR,      18,      11
LSTR,      11,      22
LSTR,      22,      30
LSTR,      30,      24
LSTR,      24,      12
LSTR,      12,      26
LSTR,      26,      28
LSTR,      28,       4
LSTR,       4,       3
LSTR,       3,      27
LSTR,      27,      25
LSTR,       8,      23
LSTR,       8,      25
LSTR,      23,      29
LSTR,      29,      21
LSTR,      21,       7
LSTR,       7,      19
LSTR,      19,      17
LSTR,      17,       6
LSTR,       6,      15
LSTR,      15,      16
LSTR,       6,      10
LSTR,      17,      20
LSTR,      19,      18
LSTR,      21,      11
LSTR,      29,      22
LSTR,      23,      24
LSTR,       8,      12
LSTR,      25,      26
LSTR,      27,      28
FLST,2,2,4,ORDE,2
FITEM,2,38
FITEM,2,40
LDELE,P51X
LSTR,      29,      30
SAVE
FLST,2,4,4
FITEM,2,1
FITEM,2,3
FITEM,2,2
FITEM,2,4
AL,P51X
FLST,2,4,4
FITEM,2,5
FITEM,2,2
FITEM,2,8
FITEM,2,7
AL,P51X
FLST,2,4,4
FITEM,2,6
FITEM,2,33
FITEM,2,7
FITEM,2,9
AL,P51X
FLST,2,4,4
FITEM,2,32
FITEM,2,33
FITEM,2,10
FITEM,2,34
AL,P51X
FLST,2,4,4
FITEM,2,31
FITEM,2,34
FITEM,2,35
FITEM,2,11
AL,P51X
FLST,2,4,4
FITEM,2,29
FITEM,2,36
FITEM,2,13
FITEM,2,37
AL,P51X
kdele, 7
FLST,2,2,4,ORDE,2
FITEM,2,28
FITEM,2,-29
LDELE,P51X
KDELE,       7
LSTR,      19,      21
FLST,2,4,4
FITEM,2,30
FITEM,2,35
FITEM,2,36
FITEM,2,12
AL,P51X
FLST,2,4,4
FITEM,2,28
FITEM,2,37
FITEM,2,36
FITEM,2,13
AL,P51X
FLST,2,4,4
FITEM,2,27
FITEM,2,38
FITEM,2,15
FITEM,2,37
AL,P51X
FINISH
/CLEAR,NOSTART
/COM,ANSYS RELEASE Release 16.1      BUILD 16.1      UP20150325       16:20:56
FINISH
! /EXIT,NOSAV
/BATCH
/COM,ANSYS RELEASE Release 16.1      BUILD 16.1      UP20150325       13:31:11
/input,menust,tmp,''
/COM,ANSYS RELEASE Release 16.1      BUILD 16.1      UP20150325       13:31:11
/GST,ON
/PLO,INFO,3
/GRO,CURL,ON
/CPLANE,1
WPSTYLE,,,,,,,,0
/CLEAR,NOSTART
/COM,ANSYS RELEASE Release 16.1      BUILD 16.1      UP20150325       13:31:24
/CLEAR,NOSTART
/COM,ANSYS RELEASE Release 16.1      BUILD 16.1      UP20150325       13:31:25
/COM,ANSYS RELEASE Release 16.1      BUILD 16.1      UP20150325       00:46:29
! K,1,18.278,0,0
! K,2,26.778,0,0
! K,0,0,-42.750
! K,0,0,-49.250
! \begin
! begin
! \prep7
/prep7
K,1,18.278,0,0
K,2,26.778,0,0
K,0,0,-42.750
K,0,0,-49.250
FLST,3,8,8
FITEM,3,18.4,-7.1,0
FITEM,3,17.8,-16.05,0
FITEM,3,14.9,-27.95,0
FITEM,3,7.9,-37.9,0
FITEM,3,26.3,-7.35,0
FITEM,3,25.1,-18.15,0
FITEM,3,20.75,-32.8,0
FITEM,3,10.05,-44.7,0
K, ,P51X
LSTR,       1,       2
LSTR,       3,       4
FLST,3,6,3
FITEM,3,1
FITEM,3,5
FITEM,3,6
FITEM,3,7
FITEM,3,8
FITEM,3,3
BSPLIN, ,P51X
FLST,3,6,3
FITEM,3,2
FITEM,3,9
FITEM,3,10
FITEM,3,11
FITEM,3,12
FITEM,3,4
BSPLIN, ,P51X
ET,1,SOLID185
lplot
kplot
FLST,3,14,8
FITEM,3,18.5,-3.7,0
FITEM,3,18.15,-12,0
FITEM,3,17.3,-20.35,0
FITEM,3,16.15,-25.05,0
FITEM,3,13.25,-31.3,0
FITEM,3,10.5,-35.3,0
FITEM,3,4.4,-40.6,0
FITEM,3,5.15,-46.75,0
FITEM,3,14.75,-40.65,0
FITEM,3,19.1,-36.2,0
FITEM,3,22.95,-28.1,0
FITEM,3,24.7,-21.9,0
FITEM,3,26.2,-12.95,0
FITEM,3,26.55,-3.7,0
K, ,P51X
lplot
FLST,2,4,4,ORDE,2
FITEM,2,1
FITEM,2,-4
LDELE,P51X
kplot
KDELE,      25
kplot
FLST,3,1,8
FITEM,3,25.8,-12.55,0
K, ,P51X
kplot
SAVE
LSTR,       1,      13
LSTR,      26,       2
LSTR,       1,       2
LSTR,      13,      26
LSTR,      13,       5
LSTR,       5,      14
LSTR,      14,       6
LSTR,       6,      15
LSTR,      15,      16
LSTR,      16,       7
LSTR,       7,      17
LSTR,      17,      18
LSTR,      18,       8
LSTR,       8,      19
LSTR,      19,       3
LSTR,       3,       4
LSTR,       4,      20
LSTR,      20,      12
LSTR,      12,      21
LSTR,      21,      22
LSTR,      22,      11
LSTR,      11,      23
LSTR,      23,      24
LSTR,      24,      10
LSTR,      10,      25
LSTR,      25,       9
LSTR,      26,       9
LSTR,       5,       9
LSTR,      14,      25
LSTR,       6,      10
LSTR,      15,      24
LSTR,      16,      23
LSTR,       7,      11
LSTR,      17,      22
LSTR,      18,      21
LSTR,       8,      12
LSTR,      19,      20
kplot
FLST,2,4,4
FITEM,2,1
FITEM,2,4
FITEM,2,2
FITEM,2,3
AL,P51X
FLST,2,4,4
FITEM,2,5
FITEM,2,28
FITEM,2,4
FITEM,2,27
AL,P51X
FLST,2,4,4
FITEM,2,6
FITEM,2,26
FITEM,2,28
FITEM,2,29
AL,P51X
FLST,2,4,4
FITEM,2,7
FITEM,2,30
FITEM,2,25
FITEM,2,29
AL,P51X
FLST,2,4,4
FITEM,2,8
FITEM,2,24
FITEM,2,31
FITEM,2,30
AL,P51X
FLST,2,4,4
FITEM,2,9
FITEM,2,32
FITEM,2,23
FITEM,2,31
AL,P51X
FLST,2,4,4
FITEM,2,10
FITEM,2,22
FITEM,2,32
FITEM,2,33
AL,P51X
FLST,2,4,4
FITEM,2,11
FITEM,2,21
FITEM,2,34
FITEM,2,33
AL,P51X
FLST,2,4,4
FITEM,2,12
FITEM,2,20
FITEM,2,35
FITEM,2,34
AL,P51X
FLST,2,4,4
FITEM,2,13
FITEM,2,36
FITEM,2,19
FITEM,2,35
AL,P51X
FLST,2,4,4
FITEM,2,14
FITEM,2,18
FITEM,2,37
FITEM,2,36
AL,P51X
FLST,2,3,4
FITEM,2,16
FITEM,2,15
FITEM,2,17
AL,P51X
FLST,2,4,4
FITEM,2,16
FITEM,2,37
FITEM,2,17
FITEM,2,15
AL,P51X
FLST,2,12,5,ORDE,2
FITEM,2,1
FITEM,2,-12
FLST,8,2,3
FITEM,8,3
FITEM,8,4
VROTAT,P51X, , , , , ,P51X, ,360,4,
SAVE
FLST,5,241,4,ORDE,2
FITEM,5,1
FITEM,5,-241
CM,_Y,LINE
LSEL, , , ,P51X
CM,_Y1,LINE
CMSEL,,_Y
LESIZE,_Y1, , ,8, , , , ,1
MSHAPE,0,3D
MSHKEY,1
FLST,5,48,6,ORDE,2
FITEM,5,1
FITEM,5,-48
CM,_Y,VOLU
VSEL, , , ,P51X
CM,_Y1,VOLU
CHKMSH,'VOLU'
CMSEL,S,_Y
VMESH,_Y1
CMDELE,_Y
CMDELE,_Y1
CMDELE,_Y2
FLST,2,48,6,ORDE,2
FITEM,2,1
FITEM,2,-48
VCLEAR,P51X
FLST,5,241,4,ORDE,2
FITEM,5,1
FITEM,5,-241
CM,_Y,LINE
LSEL, , , ,P51X
CM,_Y1,LINE
CMSEL,,_Y
LESIZE,_Y1, , ,4, , , , ,1
FLST,5,48,6,ORDE,2
FITEM,5,1
FITEM,5,-48
CM,_Y,VOLU
VSEL, , , ,P51X
CM,_Y1,VOLU
CHKMSH,'VOLU'
CMSEL,S,_Y
VMESH,_Y1
CMDELE,_Y
CMDELE,_Y1
CMDELE,_Y2
nlist
elist
nsel,s,loc,y,0
nplot
allsel
eplot
! cplane,0
/cplane,0
/type,1,5
allsel
eplot
eplot
/type,1,2
ASEL, s, , , 13
ASEL, a, , , 18
ASEL, a, , , 22
ASEL, a, , , 26
ASEL, a, , , 30
ASEL, a, , , 34
ASEL, a, , , 38
ASEL, a, , , 42
ASEL, a, , , 46
ASEL, a, , , 50
ASEL, a, , , 54
ASEL, a, , , 59
ASEL, a, , , 61
ASEL, a, , , 66
ASEL, a, , , 70
ASEL, a, , , 74
ASEL, a, , , 78
ASEL, a, , , 82
ASEL, a, , , 86
ASEL, a, , , 90
ASEL, a, , , 94
ASEL, a, , , 98
ASEL, a, , , 102
ASEL, a, , , 107
ASEL, a, , , 109
ASEL, a, , , 114
ASEL, a, , , 118
ASEL, a, , , 122
ASEL, a, , , 126
ASEL, a, , , 130
ASEL, a, , , 134
ASEL, a, , , 138
ASEL, a, , , 142
ASEL, a, , , 146
ASEL, a, , , 150
ASEL, a, , , 155
ASEL, a, , , 157
ASEL, a, , , 161
ASEL, a, , , 164
ASEL, a, , , 167
ASEL, a, , , 170
ASEL, a, , , 173
ASEL, a, , , 176
ASEL, a, , , 179
ASEL, a, , , 182
ASEL, a, , , 185
ASEL, a, , , 188
ASEL, a, , , 192
CM, INNER_SURFACE, AREA
NSLA, S, 1
nplot
nlist
SAVE
FINISH
! /EXIT,MODEL
/BATCH
/COM,ANSYS RELEASE Release 16.1      BUILD 16.1      UP20150325       18:25:31
/input,menust,tmp,''
/COM,ANSYS RELEASE Release 16.1      BUILD 16.1      UP20150325       18:25:31
/GST,ON
/PLO,INFO,3
/GRO,CURL,ON
/CPLANE,1
/POST1
WPSTYLE,,,,,,,,0
allsel
eplot
FINISH
/SOL
FINISH
/PREP7
FLST,2,48,6,ORDE,2
FITEM,2,1
FITEM,2,-48
VCLEAR,P51X
lplot
FLST,5,241,4,ORDE,2
FITEM,5,1
FITEM,5,-241
CM,_Y,LINE
LSEL, , , ,P51X
CM,_Y1,LINE
CMSEL,,_Y
LESIZE,_Y1, , ,12, , , , ,1
FLST,5,48,6,ORDE,2
FITEM,5,1
FITEM,5,-48
CM,_Y,VOLU
VSEL, , , ,P51X
CM,_Y1,VOLU
CHKMSH,'VOLU'
CMSEL,S,_Y
VMESH,_Y1
CMDELE,_Y
CMDELE,_Y1
CMDELE,_Y2
nlist
elist
FLST,2,48,6,ORDE,2
FITEM,2,1
FITEM,2,-48
VCLEAR,P51X
FLST,5,241,4,ORDE,2
FITEM,5,1
FITEM,5,-241
CM,_Y,LINE
LSEL, , , ,P51X
CM,_Y1,LINE
CMSEL,,_Y
LESIZE,_Y1,2, ,0, , , , ,1
FLST,5,48,6,ORDE,2
FITEM,5,1
FITEM,5,-48
CM,_Y,VOLU
VSEL, , , ,P51X
CM,_Y1,VOLU
CHKMSH,'VOLU'
CMSEL,S,_Y
VMESH,_Y1
CMDELE,_Y
CMDELE,_Y1
CMDELE,_Y2
CMLIST,INNER_SURFACE,0
cmsel,s,inner_surface_node
cmsel,s,inner_surface,node
nplot
cmplot
nsel,s,node,inner_surface
nsel,s,all,inner_surface
nsel,s,,inner_surface
nsel,s,1,inner_surface
FINISH
! /EXIT,NOSAV
/BATCH
/COM,ANSYS RELEASE Release 16.1      BUILD 16.1      UP20150325       15:38:31
/input,menust,tmp,''
/GST,ON
/PLO,INFO,3
/GRO,CURL,ON
/CPLANE,1
WPSTYLE,,,,,,,,0
/PREP7
ET,1,SOLID185
CSYS, 2
! /CLEAR,NOSTART
/COM,ANSYS RELEASE Release 16.1      BUILD 16.1      UP20150325       00:46:29
/prep7
CSYS, 2
K,1,18.278,0,0
K,2,26.778,0,0
K,0,0,-42.750
K,0,0,-49.250
FLST,3,8,8
FITEM,3,18.4,-7.1,0
FITEM,3,17.8,-16.05,0
FITEM,3,14.9,-27.95,0
FITEM,3,7.9,-37.9,0
FITEM,3,26.3,-7.35,0
FITEM,3,25.1,-18.15,0
FITEM,3,20.75,-32.8,0
FITEM,3,10.05,-44.7,0
K, ,P51X
LSTR,       1,       2
LSTR,       3,       4
FLST,3,6,3
FITEM,3,1
FITEM,3,5
FITEM,3,6
FITEM,3,7
FITEM,3,8
FITEM,3,3
BSPLIN, ,P51X
FLST,3,6,3
FITEM,3,2
FITEM,3,9
FITEM,3,10
FITEM,3,11
FITEM,3,12
FITEM,3,4
BSPLIN, ,P51X
FINISH
/CLEAR,NOSTART
/COM,ANSYS RELEASE Release 16.1      BUILD 16.1      UP20150325       15:40:01
/CLEAR,NOSTART
/COM,ANSYS RELEASE Release 16.1      BUILD 16.1      UP20150325       15:40:06
/COM,ANSYS RELEASE Release 16.1      BUILD 16.1      UP20150325       00:46:29
/prep7
CSYS, 2
K,1,18.278,0,0
K,2,26.778,0,0
K,0,0,-42.750
K,0,0,-49.250
FLST,3,8,8
FITEM,3,18.4,-7.1,0
FITEM,3,17.8,-16.05,0
FITEM,3,14.9,-27.95,0
FITEM,3,7.9,-37.9,0
FITEM,3,26.3,-7.35,0
FITEM,3,25.1,-18.15,0
kplot
allsel
kplot
FITEM,3,20.75,-32.8,0
FITEM,3,10.05,-44.7,0
K, ,P51X
LSTR,       1,       2
LSTR,       3,       4
FINISH
/CLEAR,NOSTART
/COM,ANSYS RELEASE Release 16.1      BUILD 16.1      UP20150325       15:40:59
/CLEAR,NOSTART
/COM,ANSYS RELEASE Release 16.1      BUILD 16.1      UP20150325       15:41:38
/CLEAR,NOSTART
/COM,ANSYS RELEASE Release 16.1      BUILD 16.1      UP20150325       15:41:42
! K, 1, 18.278, 0, 0
/prep7
k, 1, 18.278,0,0
allsel
kplot
k, 2, 26.778, 0, 0
k, 0, 0,  -42.750
k,3, 0, 0, -49.250
kplot
kdele, 0
kdele, 3
kdele, 4
klist
FINISH
/CLEAR,NOSTART
/COM,ANSYS RELEASE Release 16.1      BUILD 16.1      UP20150325       15:44:08
! K,1,18.278,0,0
! K,2,26.778,0,0
! K,3, 0,0,-42.750
! K,4, 0,0,-49.250
/prep7
K,1,18.278,0,0
K,2,26.778,0,0
K,3, 0,0,-42.750
K,4, 0,0,-49.250
FLST,3,8,8
FITEM,3,18.4,-7.1,0
FITEM,3,17.8,-16.05,0
FITEM,3,14.9,-27.95,0
FITEM,3,7.9,-37.9,0
FITEM,3,26.3,-7.35,0
FITEM,3,25.1,-18.15,0
FITEM,3,20.75,-32.8,0
FITEM,3,10.05,-44.7,0
K, ,P51X
FINISH
/CLEAR,NOSTART
/COM,ANSYS RELEASE Release 16.1      BUILD 16.1      UP20150325       15:44:48
/CLEAR,NOSTART
/COM,ANSYS RELEASE Release 16.1      BUILD 16.1      UP20150325       15:45:36
/prep7
CSYS, 2
K,1,18.278,0,0
K,2,26.778,0,0
K,3, 0,0,-42.750
K,4, 0,0,-49.250
FLST,3,8,8
FITEM,3,18.4,0, -7.1
FITEM,3,17.8,0, -16.05
FITEM,3,14.9,0,-27.95
FITEM,3,7.9,0,-37.9
FITEM,3,26.3,0,-7.35
FITEM,3,25.1,0,-18.15
FITEM,3,20.75,0,-32.8
FITEM,3,10.05,0,-44.7
K, ,P51X
LSTR,       1,       2
LSTR,       3,       4
FLST,3,6,3
FITEM,3,1
FITEM,3,5
FITEM,3,6
FITEM,3,7
FITEM,3,8
FITEM,3,3
BSPLIN, ,P51X
FLST,3,6,3
FITEM,3,2
FITEM,3,9
FITEM,3,10
FITEM,3,11
FITEM,3,12
FITEM,3,4
BSPLIN, ,P51X
! /CLEAR,NOSTART
/prep7
CSYS, 2
K,1,18.278,0,0
K,2,26.778,0,0
!K,3, 0,0,-42.750
!K,4, 0,0,-49.250
FLST,3,8,8
FITEM,3,18.4,0, -7.1
FITEM,3,17.8,0, -16.05
FITEM,3,14.9,0,-27.95
FITEM,3,7.9,0,-37.9
FITEM,3,26.3,0,-7.35
FITEM,3,25.1,0,-18.15
FITEM,3,20.75,0,-32.8
FITEM,3,10.05,0,-44.7
K, ,P51X
LSTR,       1,       2
LSTR,       3,       4
FLST,3,6,3
FITEM,3,1
FITEM,3,5
FITEM,3,6
FITEM,3,7
FITEM,3,8
FITEM,3,3
BSPLIN, ,P51X
FLST,3,6,3
FITEM,3,2
FITEM,3,9
FITEM,3,10
FITEM,3,11
FITEM,3,12
FITEM,3,4
BSPLIN, ,P51X
FINISH
/CLEAR,NOSTART
/COM,ANSYS RELEASE Release 16.1      BUILD 16.1      UP20150325       15:46:27
/CLEAR,NOSTART
/COM,ANSYS RELEASE Release 16.1      BUILD 16.1      UP20150325       15:46:31
/prep7
CSYS, 2
K,1,18.278,0,0
K,2,26.778,0,0
!K,3, 0,0,-42.750
!K,4, 0,0,-49.250
FLST,3,8,8
FITEM,3,18.4,0, -7.1
FITEM,3,17.8,0, -16.05
FITEM,3,14.9,0,-27.95
FITEM,3,7.9,0,-37.9
FITEM,3,26.3,0,-7.35
FITEM,3,25.1,0,-18.15
FITEM,3,20.75,0,-32.8
FITEM,3,10.05,0,-44.7
K, ,P51X
! /CLEAR,NOSTART
/prep7
CSYS, 2
K,1,18.278,0,0
K,2,26.778,0,0
!K,3, 0,0,-42.750
!K,4, 0,0,-49.250
FLST,3,8,8
FITEM,3,18.4,0, -7.1
FITEM,3,17.8,0, -16.05
FITEM,3,14.9,0,-27.95
FITEM,3,7.9,0,-37.9
FITEM,3,26.3,0,-7.35
FITEM,3,25.1,0,-18.15
FITEM,3,20.75,0,-32.8
FITEM,3,10.05,0,-44.7
K, ,P51X
LSTR,       1,       2
LSTR,       6,       10
FINISH
/CLEAR,NOSTART
/COM,ANSYS RELEASE Release 16.1      BUILD 16.1      UP20150325       15:47:30
/CLEAR,NOSTART
/COM,ANSYS RELEASE Release 16.1      BUILD 16.1      UP20150325       15:47:33
/prep7
CSYS, 2
K,1,18.278,0,0
K,2,26.778,0,0
!K,3, 0,0,-42.750
!K,4, 0,0,-49.250
K,3, 0,0,-42.750
K,4, 0,0,-49.250
FINISH
/CLEAR,NOSTART
/COM,ANSYS RELEASE Release 16.1      BUILD 16.1      UP20150325       15:47:54
/CLEAR,NOSTART
/COM,ANSYS RELEASE Release 16.1      BUILD 16.1      UP20150325       15:48:01
/prep7
CSYS, 2
K,1,18.278,0,0
K,2,26.778,0,0
FLST,3,8,8
FITEM,3,18.4,0, -7.1
FITEM,3,17.8,0, -16.05
FITEM,3,14.9,0,-27.95
FITEM,3,7.9,0,-37.9
FITEM,3,26.3,0,-7.35
FITEM,3,25.1,0,-18.15
FITEM,3,20.75,0,-32.8
FITEM,3,10.05,0,-44.7
K, ,P51X
k, 11, 0, 0, -42.750
kdele, 11
k,11,0, 0, 42.750
kdele, 11
LSTR,       6,      10
LSTR,       1,       2
FLST,3,5,3
FITEM,3,6
FITEM,3,5
FITEM,3,4
FITEM,3,3
FITEM,3,1
BSPLIN, ,P51X
FLST,3,5,3
FITEM,3,10
FITEM,3,9
FITEM,3,8
FITEM,3,7
FITEM,3,2
BSPLIN, ,P51X
lplot
FLST,2,4,4
FITEM,2,3
FITEM,2,1
FITEM,2,4
FITEM,2,2
AL,P51X
FLST,2,1,5,ORDE,1
FITEM,2,1
FLST,8,2,3
FITEM,8,6
FITEM,8,10
VROTAT,P51X, , , , , ,P51X, ,360,4,
FINISH
/CLEAR,NOSTART
/COM,ANSYS RELEASE Release 16.1      BUILD 16.1      UP20150325       15:50:51
/CLEAR,NOSTART
/COM,ANSYS RELEASE Release 16.1      BUILD 16.1      UP20150325       15:51:05
/prep7
!CSYS, 2
K,1,18.278,0,0
K,2,26.778,0,0
K,3, 0,0,-42.750
K,4, 0,0,-49.250
FLST,3,8,8
FITEM,3,18.4,0, -7.1
FITEM,3,17.8,0, -16.05
FITEM,3,14.9,0,-27.95
FITEM,3,7.9,0,-37.9
FITEM,3,26.3,0,-7.35
FITEM,3,25.1,0,-18.15
FITEM,3,20.75,0,-32.8
FITEM,3,10.05,0,-44.7
K, ,P51X
LSTR,       1,       2
LSTR,       3,       4
FLST,3,6,3
FITEM,3,1
FITEM,3,5
FITEM,3,6
FITEM,3,7
FITEM,3,8
FITEM,3,3
BSPLIN, ,P51X
FLST,3,6,3
FITEM,3,2
FITEM,3,9
FITEM,3,10
FITEM,3,11
FITEM,3,12
FITEM,3,4
BSPLIN, ,P51X
FLST,2,4,4
FITEM,2,3
FITEM,2,2
FITEM,2,4
FITEM,2,1
AL,P51X
FLST,2,1,5,ORDE,1
FITEM,2,1
FLST,8,2,3
FITEM,8,3
FITEM,8,4
VROTAT,P51X, , , , , ,P51X, ,360,4,
SAVE,'z_oriented_lv','db','D:\Life\Education\PhD\RootNode\2018\FEA\ansys_gr_updated\test_functions\create_lv_mesh\'
ET,1,SOLID185
SAVE
SAVE
SAVE
SAVE
lplot
FLST,5,5,4,ORDE,5
FITEM,5,1
FITEM,5,-2
FITEM,5,7
FITEM,5,12
FITEM,5,17
CM,_Y,LINE
LSEL, , , ,P51X
CM,_Y1,LINE
CMSEL,,_Y
LESIZE,_Y1, , ,4, , , , ,1
FLST,5,8,4,ORDE,6
FITEM,5,3
FITEM,5,-6
FITEM,5,10
FITEM,5,-11
FITEM,5,15
FITEM,5,-16
CM,_Y,LINE
LSEL, , , ,P51X
CM,_Y1,LINE
CMSEL,,_Y
LESIZE,_Y1, , ,24, , , , ,1
FLST,5,4,6,ORDE,2
FITEM,5,1
FITEM,5,-4
CM,_Y,VOLU
VSEL, , , ,P51X
CM,_Y1,VOLU
CHKMSH,'VOLU'
CMSEL,S,_Y
VSWEEP,_Y1
CMDELE,_Y
CMDELE,_Y1
CMDELE,_Y2
FLST,2,4,6,ORDE,2
FITEM,2,1
FITEM,2,-4
VCLEAR,P51X
MSHAPE,0,3D
MSHKEY,1
FLST,5,4,6,ORDE,2
FITEM,5,1
FITEM,5,-4
CM,_Y,VOLU
VSEL, , , ,P51X
CM,_Y1,VOLU
CHKMSH,'VOLU'
CMSEL,S,_Y
VMESH,_Y1
CMDELE,_Y
CMDELE,_Y1
CMDELE,_Y2
elist
nlist
nsel,z,loc,y,0
nplot
allsel
nplot
nsel,s,z,loc,0
nsel,s,loc,z,0
nplot
allsel
eplot
ASEL, s, , , 2
ASEL, a, , , 6
ASEL, a, , , 10
ASEL, a, , , 14
CM, INNER_SURFACE, AREA
NSLA, S, 1
nplot
allsel
nplot
ASEL, s, , , 2
ASEL, a, , , 6
ASEL, a, , , 10
ASEL, a, , , 14
CM, INNER_SURFACE, AREA
NSLA, S, 1
nplot
nlist
allsel
eplot
/type,1,5
SAVE
FINISH
! /EXIT,MODEL
/BATCH
/COM,ANSYS RELEASE Release 16.1      BUILD 16.1      UP20150325       18:24:58
/input,menust,tmp,''
/GST,ON
/PLO,INFO,3
/GRO,CURL,ON
/CPLANE,1
/PREP7
WPSTYLE,,,,,,,,0
ET,1,SOLID185
BLC4,0,0,1,1,1
FLST,5,12,4,ORDE,2
FITEM,5,1
FITEM,5,-12
CM,_Y,LINE
LSEL, , , ,P51X
CM,_Y1,LINE
CMSEL,,_Y
LESIZE,_Y1,1, , , , , , ,1
MSHAPE,0,3D
MSHKEY,1
CM,_Y,VOLU
VSEL, , , ,       1
CM,_Y1,VOLU
CHKMSH,'VOLU'
CMSEL,S,_Y
VMESH,_Y1
CMDELE,_Y
CMDELE,_Y1
CMDELE,_Y2
nlist
csys,2
nlist
FINISH
/CLEAR,NOSTART
/COM,ANSYS RELEASE Release 16.1      BUILD 16.1      UP20150325       18:26:07
/CLEAR,NOSTART
/COM,ANSYS RELEASE Release 16.1      BUILD 16.1      UP20150325       18:26:12
/PREP7
ET,1,SOLID185
CSYS,2
BLC4,0,0,1,1,1
FLST,5,12,4,ORDE,2
FITEM,5,1
FITEM,5,-12
CM,_Y,LINE
LSEL, , , ,P51X
CM,_Y1,LINE
CMSEL,,_Y
LESIZE,_Y1,1, , , , , , ,1
MSHAPE,0,3D
MSHKEY,1
CM,_Y,VOLU
VSEL, , , ,       1
CM,_Y1,VOLU
CHKMSH,'VOLU'
CMSEL,S,_Y
VMESH,_Y1
CMDELE,_Y
CMDELE,_Y1
CMDELE,_Y2
nlist
FINISH
/CLEAR,NOSTART
/COM,ANSYS RELEASE Release 16.1      BUILD 16.1      UP20150325       18:27:23
FINISH
! /EXIT,NOSAV
/BATCH
/COM,ANSYS RELEASE Release 16.1      BUILD 16.1      UP20150325       18:28:42
/input,menust,tmp,''
/GST,ON
/PLO,INFO,3
/GRO,CURL,ON
/CPLANE,1
WPSTYLE,,,,,,,,0
CSWPLA,15,2,1,1,
csys,15
/PREP7
ET,1,SOLID185
BLC4,0,0,1,1,1
FLST,5,12,4,ORDE,2
FITEM,5,1
FITEM,5,-12
CM,_Y,LINE
LSEL, , , ,P51X
CM,_Y1,LINE
CMSEL,,_Y
LESIZE,_Y1,1, , , , , , ,1
MSHAPE,0,3D
MSHKEY,1
CM,_Y,VOLU
VSEL, , , ,       1
CM,_Y1,VOLU
CHKMSH,'VOLU'
CMSEL,S,_Y
VMESH,_Y1
CMDELE,_Y
CMDELE,_Y1
CMDELE,_Y2
nlist
FINISH
! /EXIT,NOSAV
/BATCH
/COM,ANSYS RELEASE Release 16.1      BUILD 16.1      UP20150325       11:35:10
/input,menust,tmp,''
/GST,ON
/PLO,INFO,3
/GRO,CURL,ON
/CPLANE,1
WPSTYLE,,,,,,,,0
/CLEAR,NOSTART
/COM,ANSYS RELEASE Release 16.1      BUILD 16.1      UP20150325       11:35:40
/prep7
!CSYS, 2
K,1,18.278,0,0
K,2,26.778,0,0
K,3, 0,0,-42.750
K,4, 0,0,-49.250
FLST,3,8,8
FITEM,3,18.4,0, -7.1
FITEM,3,17.8,0, -16.05
FITEM,3,14.9,0,-27.95
FITEM,3,7.9,0,-37.9
FITEM,3,26.3,0,-7.35
FITEM,3,25.1,0,-18.15
FITEM,3,20.75,0,-32.8
FITEM,3,10.05,0,-44.7
K, ,P51X
LSTR,       1,       2
LSTR,       3,       4
FLST,3,6,3
FITEM,3,1
FITEM,3,5
FITEM,3,6
FITEM,3,7
FITEM,3,8
FITEM,3,3
BSPLIN, ,P51X
FLST,3,6,3
FITEM,3,2
FITEM,3,9
FITEM,3,10
FITEM,3,11
FITEM,3,12
FITEM,3,4
BSPLIN, ,P51X
FLST,2,8,3,ORDE,2
FITEM,2,5
FITEM,2,-12
KDELE,P51X
kplot
/NUMBER,0
FLST,3,10,8
FITEM,3,21.35,7.75,0
FITEM,3,22.9,15.6,0
FITEM,3,23.65,22,0
FITEM,3,20.65,28,0
FITEM,3,28.4,9.1,0
FITEM,3,28.95,17.2,0
FITEM,3,28.2,24.65,0
FITEM,3,24.85,31.15,0
FITEM,3,20.4,33.6,0
FITEM,3,16.85,28.15,0
K, ,P51X
FINISH
/CLEAR,NOSTART
/COM,ANSYS RELEASE Release 16.1      BUILD 16.1      UP20150325       11:37:42
/CLEAR,NOSTART
/COM,ANSYS RELEASE Release 16.1      BUILD 16.1      UP20150325       11:37:45
/prep7
!CSYS, 2
K,1,18.278,0,0
K,2,26.778,0,0
K,3, 0,0,-42.750
K,4, 0,0,-49.250
FLST,3,8,8
FITEM,3,18.4,0, -7.1
FITEM,3,17.8,0, -16.05
FITEM,3,14.9,0,-27.95
FITEM,3,7.9,0,-37.9
FITEM,3,26.3,0,-7.35
FITEM,3,25.1,0,-18.15
FITEM,3,20.75,0,-32.8
FITEM,3,10.05,0,-44.7
K, ,P51X
LSTR,       1,       2
LSTR,       3,       4
FLST,3,6,3
FITEM,3,1
FITEM,3,5
FITEM,3,6
FITEM,3,7
FITEM,3,8
FITEM,3,3
BSPLIN, ,P51X
FLST,3,6,3
FITEM,3,2
FITEM,3,9
FITEM,3,10
FITEM,3,11
FITEM,3,12
FITEM,3,4
BSPLIN, ,P51X
FLST,2,8,3,ORDE,2
FITEM,2,5
FITEM,2,-12
KDELE,P51X
KFILL,3,1,5, , ,1,
lplot
FINISH
/CLEAR,NOSTART
/COM,ANSYS RELEASE Release 16.1      BUILD 16.1      UP20150325       11:38:42
/CLEAR,NOSTART
/COM,ANSYS RELEASE Release 16.1      BUILD 16.1      UP20150325       11:38:51
/prep7
!CSYS, 2
K,1,18.278,0,0
K,2,26.778,0,0
K,3, 0,0,-42.750
K,4, 0,0,-49.250
FLST,3,8,8
FITEM,3,18.4,0, -7.1
FITEM,3,17.8,0, -16.05
FITEM,3,14.9,0,-27.95
FITEM,3,7.9,0,-37.9
FITEM,3,26.3,0,-7.35
FITEM,3,25.1,0,-18.15
FITEM,3,20.75,0,-32.8
FITEM,3,10.05,0,-44.7
K, ,P51X
FLST,2,8,3,ORDE,2
FITEM,2,5
FITEM,2,-12
KDELE,P51X
kplot
KFILL,3,1,1,5, ,1,
KDELE,       5
kplot
FINISH
/CLEAR,NOSTART
/COM,ANSYS RELEASE Release 16.1      BUILD 16.1      UP20150325       11:40:02
FINISH
! /EXIT,NOSAV
